// SBML level 3 version 1

model Keratinocyte_Model()
  // model units - substance: substance, time: time, volume: volume, area: area, length: length, extent: substance

  // Compartments:
  compartment default = 1 litre;

  // Species:
  species Kq in default = 0.25;  // substance in mole
  species Kd in default = 0.7499999;  // substance in mole
  species Ka in default = 0;  // substance in mole
  species Ks in default = 0;  // substance in mole
  species $Source in default = 0;  // substance in mole
  species $Sink in default = 0;  // substance in mole
  species Iq in default = 0.9999998;  // substance in mole
  species Ia in default = 0;  // substance in mole
  species TGFB in default = 0;  // substance in mole
  species IFNG in default = 0;  // substance in mole
  species TGFA in default = 0;  // substance in mole
  species IL1 in default = 0;  // substance in mole
  species TNFA in default = 0;  // substance in mole
  species C in default = 0;  // substance in mole
  species F in default = 0;  // substance in mole
  species TGFB_D in default = 0;  // substance in mole
  species IFNG_D in default = 0;  // substance in mole
  species TNFA_D in default = 0;  // substance in mole
  species TGFB_P in default = 0.9999998;  // substance in mole
  species W in default = 0.9999998;  // substance in mole

  // Parameters:
  _Half_Maximal_Amount_of_Wounding_to_Damage_System = 0.1008; _Half_Maximal_Amount_of_Wounding_to_Damage_System is ""Half-Maximal Amount of Wounding to Damage System"";
  _Half_Maximal_Number_of_Keratinocytes = 76.9797; _Half_Maximal_Number_of_Keratinocytes is ""Half-Maximal Number of Keratinocytes"";
  _Half_Maximal_Concentration_of_TGFB_Inhibiting_Keratinocyte_Proliferation = 0.7236; _Half_Maximal_Concentration_of_TGFB_Inhibiting_Keratinocyte_Proliferation is ""Half-Maximal Concentration of TGFB Inhibiting Keratinocyte Proliferation"";
  _Half_Maximal_Concentration_of_Fibronectin_Promoting_Mass_Transport = 1.4977; _Half_Maximal_Concentration_of_Fibronectin_Promoting_Mass_Transport is ""Half-Maximal Concentration of Fibronectin Promoting Mass Transport"";
  _Half_Maximal_Concentration_of_Collagen_Inhibiting_Mass_Transport = 1.1991; _Half_Maximal_Concentration_of_Collagen_Inhibiting_Mass_Transport is ""Half-Maximal Concentration of Collagen Inhibiting Mass Transport"";
  _Half_Maximal_Concentration_of_IL1_Promoting_Keratinocyte_Activation = 0.0187; _Half_Maximal_Concentration_of_IL1_Promoting_Keratinocyte_Activation is ""Half-Maximal Concentration of IL1 Promoting Keratinocyte Activation"";
  _Rate_of_Quiescent_Keratinocyte_Activation = 1.2907; _Rate_of_Quiescent_Keratinocyte_Activation is ""Rate of Quiescent Keratinocyte Activation"";
  _Rate_of_Quiescent_Keratinocyte_Differentiation = 0.0262; _Rate_of_Quiescent_Keratinocyte_Differentiation is ""Rate of Quiescent Keratinocyte Differentiation"";
  _Half_Maximal_Concentration_of_TGFA_Inhibiting_Keratinocyte_Deactivation = 0.01; _Half_Maximal_Concentration_of_TGFA_Inhibiting_Keratinocyte_Deactivation is ""Half-Maximal Concentration of TGFA Inhibiting Keratinocyte Deactivation"";
  _Half_Maximal_Concentration_of_IFNG_Inhibiting_Keratinocyte_Deactivation = 5.5687; _Half_Maximal_Concentration_of_IFNG_Inhibiting_Keratinocyte_Deactivation is ""Half-Maximal Concentration of IFNG Inhibiting Keratinocyte Deactivation"";
  _Half_Maximal_Concentration_of_TGFB_Promoting_Keratinocyte_Deactivation = 0.7231; _Half_Maximal_Concentration_of_TGFB_Promoting_Keratinocyte_Deactivation is ""Half-Maximal Concentration of TGFB Promoting Keratinocyte Deactivation"";
  _Rate_of_Activated_Keratinocyte_Deactivation_due_to_TGFB = 0.1832; _Rate_of_Activated_Keratinocyte_Deactivation_due_to_TGFB is ""Rate of Activated Keratinocyte Deactivation due to TGFB"";
  _Rate_of_Activated_Keratinocyte_Deactivation = 0.0022; _Rate_of_Activated_Keratinocyte_Deactivation is ""Rate of Activated Keratinocyte Deactivation"";
  _Rate_of_Activated_Keratinocyte_Differentiation = 0.0212; _Rate_of_Activated_Keratinocyte_Differentiation is ""Rate of Activated Keratinocyte Differentiation"";
  _Rate_of_Deactivation_of_Seperated_Keratinocytes = 0.0065; _Rate_of_Deactivation_of_Seperated_Keratinocytes is ""Rate of Deactivation of Seperated Keratinocytes"";
  _Rate_of_Differentiated_Keratinocyte_Clearance = 0.0102; _Rate_of_Differentiated_Keratinocyte_Clearance is ""Rate of Differentiated Keratinocyte Clearance"";
  _Rate_of_Quiescent_Keratinocyte_Proliferation = 1.4668; _Rate_of_Quiescent_Keratinocyte_Proliferation is ""Rate of Quiescent Keratinocyte Proliferation"";
  _Rate_of_Wounding_to_Quiescent_Keratinocytes = 5.621; _Rate_of_Wounding_to_Quiescent_Keratinocytes is ""Rate of Wounding to Quiescent Keratinocytes"";
  _Rate_of_Wounding_to_Differentiated_Keratinocytes = 2.7824; _Rate_of_Wounding_to_Differentiated_Keratinocytes is ""Rate of Wounding to Differentiated Keratinocytes"";
  _Rate_of_Seperated_Keratinocyte_Clearance = 0.0019; _Rate_of_Seperated_Keratinocyte_Clearance is ""Rate of Seperated Keratinocyte Clearance"";
  _Half_Maximal_Concentration_of_TNFA_Promoting_Activated_Keratinocyte_Proliferation = 0.001; _Half_Maximal_Concentration_of_TNFA_Promoting_Activated_Keratinocyte_Proliferation is ""Half-Maximal Concentration of TNFA Promoting Activated Keratinocyte Proliferation"";
  _Rate_of_Activated_Keratinocyte_Proliferation_due_to_TNFA = 0.0644; _Rate_of_Activated_Keratinocyte_Proliferation_due_to_TNFA is ""Rate of Activated Keratinocyte Proliferation due to TNFA"";
  _Half_Maximal_Concentration_of_IL1_Promoting_Activated_Keratinocyte_Proliferation = 0.1069; _Half_Maximal_Concentration_of_IL1_Promoting_Activated_Keratinocyte_Proliferation is ""Half-Maximal Concentration of IL1 Promoting Activated Keratinocyte Proliferation"";
  _Rate_of_Activated_Keratinocyte_Proliferation_due_to_IL1 = 1.2394; _Rate_of_Activated_Keratinocyte_Proliferation_due_to_IL1 is ""Rate of Activated Keratinocyte Proliferation due to IL1"";
  _Rate_of_Activated_Keratinocyte_Proliferation = 2.5343; _Rate_of_Activated_Keratinocyte_Proliferation is ""Rate of Activated Keratinocyte Proliferation"";
  _Half_Maximal_Concentration_of_IL1_Promoting_Quiescent_Immune_Cell_Activation = 0.3087; _Half_Maximal_Concentration_of_IL1_Promoting_Quiescent_Immune_Cell_Activation is ""Half-Maximal Concentration of IL1 Promoting Quiescent Immune Cell Activation"";
  _Half_Maximal_Number_of_Activated_Keratinocytes_Promoting_Quiescent_Immune_Cell_Activation = 2.2292; _Half_Maximal_Number_of_Activated_Keratinocytes_Promoting_Quiescent_Immune_Cell_Activation is ""Half-Maximal Number of Activated Keratinocytes Promoting Quiescent Immune Cell Activation"";
  _Rate_of_Quiescent_Immune_Cell_Activation_due_to_IL1 = 7.0303; _Rate_of_Quiescent_Immune_Cell_Activation_due_to_IL1 is ""Rate of Quiescent Immune Cell Activation due to IL1"";
  _Rate_of_Quiescent_Immune_Cell_Activation_due_to_Activated_Keratinocytes = 1.2214; _Rate_of_Quiescent_Immune_Cell_Activation_due_to_Activated_Keratinocytes is ""Rate of Quiescent Immune Cell Activation due to Activated Keratinocytes"";
  _Rate_of_Activated_Immune_Cell_Deactivation = 0.1088; _Rate_of_Activated_Immune_Cell_Deactivation is ""Rate of Activated Immune Cell Deactivation"";
  _Rate_of_Quiescent_Immune_Cell_Influx_due_to_IL1 = 0.007; _Rate_of_Quiescent_Immune_Cell_Influx_due_to_IL1 is ""Rate of Quiescent Immune Cell Influx due to IL1"";
  _Half_Maximal_Concentration_of_IL1_Promoting_Quiescent_Immune_Cell_Influx = 0.0001; _Half_Maximal_Concentration_of_IL1_Promoting_Quiescent_Immune_Cell_Influx is ""Half-Maximal Concentration of IL1 Promoting Quiescent Immune Cell Influx"";
  _Half_Maximal_Number_of_Activated_Immune_Cells_Promoting_Quiescent_Immune_Cell_Influx = 0.0001; _Half_Maximal_Number_of_Activated_Immune_Cells_Promoting_Quiescent_Immune_Cell_Influx is ""Half-Maximal Number of Activated Immune Cells Promoting Quiescent Immune Cell Influx"";
  _Rate_of_Quiescent_Immune_Cell_Influx_due_to_Activated_Immune_Cells = 0.0001; _Rate_of_Quiescent_Immune_Cell_Influx_due_to_Activated_Immune_Cells is ""Rate of Quiescent Immune Cell Influx due to Activated Immune Cells"";
  _Rate_of_Quiescent_Immune_Cell_Influx = 0.1; _Rate_of_Quiescent_Immune_Cell_Influx is ""Rate of Quiescent Immune Cell Influx"";
  _Rate_of_Quiescent_Immune_Cell_Clearance = 0.1; _Rate_of_Quiescent_Immune_Cell_Clearance is ""Rate of Quiescent Immune Cell Clearance"";
  _Rate_of_TGFB_Mass_Transport_Across_the_Basement_Membrane = 0.2747; _Rate_of_TGFB_Mass_Transport_Across_the_Basement_Membrane is ""Rate of TGFB Mass Transport Across the Basement Membrane"";
  _Rate_of_IFNG_Mass_Transport_Across_the_Basement_Membrane = 0.1815; _Rate_of_IFNG_Mass_Transport_Across_the_Basement_Membrane is ""Rate of IFNG Mass Transport Across the Basement Membrane"";
  _Rate_of_TNFA_Mass_Transport_Across_the_Basement_Membrane = 0.0642; _Rate_of_TNFA_Mass_Transport_Across_the_Basement_Membrane is ""Rate of TNFA Mass Transport Across the Basement Membrane"";
  _Half_Maximal_Number_of_Activated_Keratinocytes_Promoting_IL1_Production = 0.341; _Half_Maximal_Number_of_Activated_Keratinocytes_Promoting_IL1_Production is ""Half-Maximal Number of Activated Keratinocytes Promoting IL1 Production"";
  _Rate_of_IL1_Production = 0.0001; _Rate_of_IL1_Production is ""Rate of IL1 Production"";
  _Rate_of_IL1_Clearance = 1.4211; _Rate_of_IL1_Clearance is ""Rate of IL1 Clearance"";
  _Half_Maximal_Number_of_Seperated_Keratinocytes_Promoting_TNFA_Production = 0.001; _Half_Maximal_Number_of_Seperated_Keratinocytes_Promoting_TNFA_Production is ""Half-Maximal Number of Seperated Keratinocytes Promoting TNFA Production"";
  _Rate_of_TNFA_Production = 0.0004; _Rate_of_TNFA_Production is ""Rate of TNFA Production"";
  _Rate_of_TNFA_Clearance = 0.0434; _Rate_of_TNFA_Clearance is ""Rate of TNFA Clearance"";
  _Half_Maximal_Number_of_Activated_Keratinocytes_Promoting_TGFA_Production = 1; _Half_Maximal_Number_of_Activated_Keratinocytes_Promoting_TGFA_Production is ""Half-Maximal Number of Activated Keratinocytes Promoting TGFA Production"";
  _Rate_of_TGFA_Production = 0.0277; _Rate_of_TGFA_Production is ""Rate of TGFA Production"";
  _Rate_of_TGFA_Clearance = 0.0827; _Rate_of_TGFA_Clearance is ""Rate of TGFA Clearance"";
  _Half_Maximal_Number_of_Activated_Immune_Cells_Promoting_IFNG_D_Production = 1.1542; _Half_Maximal_Number_of_Activated_Immune_Cells_Promoting_IFNG_D_Production is ""Half-Maximal Number of Activated Immune Cells Promoting IFNG_D Production"";
  _Rate_of_IFNG_D_Production = 0.0738; _Rate_of_IFNG_D_Production is ""Rate of IFNG_D Production"";
  _Rate_of_IFNG_D_Clearance = 0.365; _Rate_of_IFNG_D_Clearance is ""Rate of IFNG_D Clearance"";
  _Half_Maximal_Number_of_Activated_Immune_Cells_Promoting_TNFA_D_Production = 1.3027; _Half_Maximal_Number_of_Activated_Immune_Cells_Promoting_TNFA_D_Production is ""Half-Maximal Number of Activated Immune Cells Promoting TNFA_D Production"";
  _Rate_of_TNFA_D_Production = 0.107; _Rate_of_TNFA_D_Production is ""Rate of TNFA_D Production"";
  _Rate_of_TNFA_D_Clearance = 0.1005; _Rate_of_TNFA_D_Clearance is ""Rate of TNFA_D Clearance"";
  _Rate_of_TGFB_D_Clearance = 0.0546; _Rate_of_TGFB_D_Clearance is ""Rate of TGFB_D Clearance"";
  _Rate_of_IFNG_Clearance = 0.0063; _Rate_of_IFNG_Clearance is ""Rate of IFNG Clearance"";
  _Rate_of_TGFB_Clearance = 0.1066; _Rate_of_TGFB_Clearance is ""Rate of TGFB Clearance"";
  _Half_Maximal_Number_of_Quiescent_Keratinocytes_Promoting_Collagen_Production = 0.01; _Half_Maximal_Number_of_Quiescent_Keratinocytes_Promoting_Collagen_Production is ""Half-Maximal Number of Quiescent Keratinocytes Promoting Collagen Production"";
  _Rate_of_Collagen_Production = 0.0066; _Rate_of_Collagen_Production is ""Rate of Collagen Production"";
  _Rate_of_Collagen_Clearance = 0.0089; _Rate_of_Collagen_Clearance is ""Rate of Collagen Clearance"";
  _Half_Maximal_Number_of_Activated_Keratinocytes_Promoting_Fibronectin_Production = 0.01; _Half_Maximal_Number_of_Activated_Keratinocytes_Promoting_Fibronectin_Production is ""Half-Maximal Number of Activated Keratinocytes Promoting Fibronectin Production"";
  _Rate_of_Fibronectin_Production = 0.0975; _Rate_of_Fibronectin_Production is ""Rate of Fibronectin Production"";
  _Rate_of_Fibronectin_Clearance = 0.0975; _Rate_of_Fibronectin_Clearance is ""Rate of Fibronectin Clearance"";
  _Half_Maximal_Number_of_Activated_Keratinocytes_Promoting_TGFB_Release = 1.3223; _Half_Maximal_Number_of_Activated_Keratinocytes_Promoting_TGFB_Release is ""Half-Maximal Number of Activated Keratinocytes Promoting TGFB Release"";
  _Rate_of_TGFB_Release_due_to_Activated_Keratinocytes = 0.0017; _Rate_of_TGFB_Release_due_to_Activated_Keratinocytes is ""Rate of TGFB Release due to Activated Keratinocytes"";
  _Rate_of_TGFB_Release = 0.0026; _Rate_of_TGFB_Release is ""Rate of TGFB Release"";
  _Rate_of_Wounding_to_Collagen = 9.9702; _Rate_of_Wounding_to_Collagen is ""Rate of Wounding to Collagen"";
  _Rate_of_Wounding_Clearance = 5; _Rate_of_Wounding_Clearance is ""Rate of Wounding Clearance"";

  // Reactions:
  Activation_Kq: Kq => Ka; default*(_Rate_of_Quiescent_Keratinocyte_Activation*Kq*default*IL1/(IL1 + _Half_Maximal_Concentration_of_IL1_Promoting_Keratinocyte_Activation)/default);  // modifiers: IL1
  Differentiation_Kq: Kq => Kd; default*(_Rate_of_Quiescent_Keratinocyte_Differentiation*Kq*default/default);
  Deactivation_Ka: Ka => Kq; default*((_Rate_of_Activated_Keratinocyte_Deactivation*Ka + _Rate_of_Activated_Keratinocyte_Deactivation_due_to_TGFB*Ka*TGFB/(TGFB + _Half_Maximal_Concentration_of_TGFB_Promoting_Keratinocyte_Deactivation))*(1/(_Half_Maximal_Concentration_of_IFNG_Inhibiting_Keratinocyte_Deactivation + IFNG))*(1/(_Half_Maximal_Concentration_of_TGFA_Inhibiting_Keratinocyte_Deactivation + TGFA))/default);  // modifiers: TGFB, IFNG, TGFA
  Differentiation_Ka: Ka => Ks; default*(_Rate_of_Activated_Keratinocyte_Differentiation*Ka/default);
  Deactivation_Ks: Ks => Kd; default*(_Rate_of_Deactivation_of_Seperated_Keratinocytes*Ks/default);
  Clearance_Kd: Kd => $Sink; default*(_Rate_of_Differentiated_Keratinocyte_Clearance*Kd*default/default);
  Proliferation_Kq: $Source => Kq; default*(_Rate_of_Quiescent_Keratinocyte_Proliferation*(Kq*default/(Kq*default + _Half_Maximal_Number_of_Keratinocytes))*(1/(_Half_Maximal_Concentration_of_TGFB_Inhibiting_Keratinocyte_Proliferation + TGFB))/default);  // modifiers: TGFB
  Wounding_Kq: Kq => $Sink; default*(_Rate_of_Wounding_to_Quiescent_Keratinocytes*Kq*default*W/(W + _Half_Maximal_Amount_of_Wounding_to_Damage_System)/default);  // modifiers: W
  Wounding_Kd: Kd => $Sink + IL1; default*(_Rate_of_Wounding_to_Differentiated_Keratinocytes*Kd*default*W/(W + _Half_Maximal_Amount_of_Wounding_to_Damage_System)/default);  // modifiers: W
  Clearance_Ks: Ks => $Sink; default*(_Rate_of_Seperated_Keratinocyte_Clearance*Ks/default);
  Proliferation_Ka: $Source => Ka; default*((_Rate_of_Activated_Keratinocyte_Proliferation*Ka/(Ka + _Half_Maximal_Number_of_Keratinocytes) + _Rate_of_Activated_Keratinocyte_Proliferation_due_to_IL1*Ka/(Ka + _Half_Maximal_Number_of_Keratinocytes)*IL1/(IL1 + _Half_Maximal_Concentration_of_IL1_Promoting_Activated_Keratinocyte_Proliferation) + _Rate_of_Activated_Keratinocyte_Proliferation_due_to_TNFA*Ka/(Ka + _Half_Maximal_Number_of_Keratinocytes)*TNFA/(TNFA + _Half_Maximal_Concentration_of_TNFA_Promoting_Activated_Keratinocyte_Proliferation))*1/(TGFB + _Half_Maximal_Concentration_of_TGFB_Inhibiting_Keratinocyte_Proliferation)/default);  // modifiers: TGFB, IL1, TNFA
  Activation_Iq: Iq => Ia; default*((_Rate_of_Quiescent_Immune_Cell_Activation_due_to_Activated_Keratinocytes*Iq*default*Ka/(Ka + _Half_Maximal_Number_of_Activated_Keratinocytes_Promoting_Quiescent_Immune_Cell_Activation) + _Rate_of_Quiescent_Immune_Cell_Activation_due_to_IL1*Iq*default*IL1/(IL1 + _Half_Maximal_Concentration_of_IL1_Promoting_Quiescent_Immune_Cell_Activation))/default);  // modifiers: Ka, IL1
  Deactivation_Ia: Ia => Iq; default*(_Rate_of_Activated_Immune_Cell_Deactivation*Ia/default);
  Proliferation_Iq: $Source => Iq; default*((_Rate_of_Quiescent_Immune_Cell_Influx + _Rate_of_Quiescent_Immune_Cell_Influx_due_to_Activated_Immune_Cells*Ia/(Ia + _Half_Maximal_Number_of_Activated_Immune_Cells_Promoting_Quiescent_Immune_Cell_Influx) + _Rate_of_Quiescent_Immune_Cell_Influx_due_to_IL1*IL1/(IL1 + _Half_Maximal_Concentration_of_IL1_Promoting_Quiescent_Immune_Cell_Influx))/default);  // modifiers: Ia, IL1
  Clearance_Iq: Iq => $Sink; default*(_Rate_of_Quiescent_Immune_Cell_Clearance*Iq*default/default);
  Production_IL1: $Source => IL1; default*(_Rate_of_IL1_Production*Ka/(Ka + _Half_Maximal_Number_of_Activated_Keratinocytes_Promoting_IL1_Production)/default);  // modifiers: Ka
  Clearance_IL1: IL1 => $Sink; default*(_Rate_of_IL1_Clearance*IL1/default);
  Production_TNFA: $Source => TNFA; default*(_Rate_of_TNFA_Production*Ks/(Ks + _Half_Maximal_Number_of_Seperated_Keratinocytes_Promoting_TNFA_Production)/default);  // modifiers: Ks
  Clearance_TNFA: TNFA => $Sink; default*(_Rate_of_TNFA_Clearance*TNFA/default);
  Production_TGFA: $Source => TGFA; default*(_Rate_of_TGFA_Production*Ka/(Ka + _Half_Maximal_Number_of_Activated_Keratinocytes_Promoting_TGFA_Production)/default);  // modifiers: Ka
  Clearance_TGFA: TGFA => $Sink; default*(_Rate_of_TGFA_Clearance*TGFA/default);
  Production_IFNG_D: $Source => IFNG_D; default*(_Rate_of_IFNG_D_Production*Ia/(Ia + _Half_Maximal_Number_of_Activated_Immune_Cells_Promoting_IFNG_D_Production)/default);  // modifiers: Ia
  Clearance_IFNG_D: IFNG_D => $Sink; default*(_Rate_of_IFNG_D_Clearance*IFNG_D/default);
  Production_TNFA_D: $Source => TNFA_D; default*(_Rate_of_TNFA_D_Production*Ia/(Ia + _Half_Maximal_Number_of_Activated_Immune_Cells_Promoting_TNFA_D_Production)/default);  // modifiers: Ia
  Clearance_TNFA_D: TNFA_D => $Sink; default*(_Rate_of_TNFA_D_Clearance*TNFA_D/default);
  Clearance_TGFB_D: TGFB_D => $Sink; default*(_Rate_of_TGFB_D_Clearance*TGFB_D/default);
  Clearance_IFNG: IFNG => $Sink; default*(_Rate_of_IFNG_Clearance*IFNG/default);
  Clearance_TGFB: TGFB => $Sink; default*(_Rate_of_TGFB_Clearance*TGFB/default);
  Production_C: $Source => C; default*(_Rate_of_Collagen_Production*Kq*default/(Kq*default + _Half_Maximal_Number_of_Quiescent_Keratinocytes_Promoting_Collagen_Production)/default);  // modifiers: Kq
  Clearance_C: C => $Sink; default*(_Rate_of_Collagen_Clearance*C/default);
  Production_F: $Source => F; default*(_Rate_of_Fibronectin_Production*Ka/(Ka + _Half_Maximal_Number_of_Activated_Keratinocytes_Promoting_Fibronectin_Production)/default);  // modifiers: Ka
  Clearance_F: F => $Sink; default*(_Rate_of_Fibronectin_Clearance*F/default);
  Release_TGFB_D: TGFB_P => TGFB_D; default*((_Rate_of_TGFB_Release*TGFB_P + _Rate_of_TGFB_Release_due_to_Activated_Keratinocytes*TGFB_P*Ka/(Ka + _Half_Maximal_Number_of_Activated_Keratinocytes_Promoting_TGFB_Release))/default);  // modifiers: Ka
  Wounding_C: C => $Sink; default*(_Rate_of_Wounding_to_Collagen*C*W/(W + _Half_Maximal_Amount_of_Wounding_to_Damage_System)/default);  // modifiers: W
  Clearance_W: W => $Sink; default*(_Rate_of_Wounding_Clearance*W/default);
  MassTransport_TGFB__forward: TGFB_D => TGFB; default*(_Rate_of_TGFB_Mass_Transport_Across_the_Basement_Membrane*TGFB_D*F/(F + _Half_Maximal_Concentration_of_Fibronectin_Promoting_Mass_Transport)*1/(C + _Half_Maximal_Concentration_of_Collagen_Inhibiting_Mass_Transport)/default); MassTransport_TGFB__forward is "MassTransport_TGFB (forward)";  // modifiers: C, F
  MassTransport_TGFB__backward: TGFB => TGFB_D; default*(_Rate_of_TGFB_Mass_Transport_Across_the_Basement_Membrane*TGFB*F/(F + _Half_Maximal_Concentration_of_Fibronectin_Promoting_Mass_Transport)*1/(C + _Half_Maximal_Concentration_of_Collagen_Inhibiting_Mass_Transport)/default); MassTransport_TGFB__backward is "MassTransport_TGFB (backward)";  // modifiers: C, F
  MassTransport_IFNG__forward: IFNG_D => IFNG; default*(_Rate_of_IFNG_Mass_Transport_Across_the_Basement_Membrane*IFNG_D*F/(F + _Half_Maximal_Concentration_of_Fibronectin_Promoting_Mass_Transport)*1/(C + _Half_Maximal_Concentration_of_Collagen_Inhibiting_Mass_Transport)/default); MassTransport_IFNG__forward is "MassTransport_IFNG (forward)";  // modifiers: C, F
  MassTransport_IFNG__backward: IFNG => IFNG_D; default*(_Rate_of_IFNG_Mass_Transport_Across_the_Basement_Membrane*IFNG*F/(F + _Half_Maximal_Concentration_of_Fibronectin_Promoting_Mass_Transport)*1/(C + _Half_Maximal_Concentration_of_Collagen_Inhibiting_Mass_Transport)/default); MassTransport_IFNG__backward is "MassTransport_IFNG (backward)";  // modifiers: C, F
  MassTransport_TNFA__forward: TNFA_D => TNFA; default*(_Rate_of_TNFA_Mass_Transport_Across_the_Basement_Membrane*TNFA_D*F/(F + _Half_Maximal_Concentration_of_Fibronectin_Promoting_Mass_Transport)*1/(C + _Half_Maximal_Concentration_of_Collagen_Inhibiting_Mass_Transport)/default); MassTransport_TNFA__forward is "MassTransport_TNFA (forward)";  // modifiers: C, F
  MassTransport_TNFA__backward: TNFA => TNFA_D; default*(_Rate_of_TNFA_Mass_Transport_Across_the_Basement_Membrane*TNFA*F/(F + _Half_Maximal_Concentration_of_Fibronectin_Promoting_Mass_Transport)*1/(C + _Half_Maximal_Concentration_of_Collagen_Inhibiting_Mass_Transport)/default); MassTransport_TNFA__backward is "MassTransport_TNFA (backward)";  // modifiers: C, F

  // Unit definitions:
  unit length = metre;
  unit area = metre^2;
  unit volume = 1e-3 litre;
  unit time = 3600 second;
  unit substance = 1e-6 mole;
end
