// SBML level 2 version 4

model model()

  // Compartments:
  compartment default = 1 volume;

  // Species:
  substanceOnly species Kq in default = 1;
  substanceOnly species Kd in default = 1;
  substanceOnly species Ka in default = 1;
  substanceOnly species Ks in default = 1;
  substanceOnly species $Source in default = 0;
  substanceOnly species $Sink in default = 0;

  // Parameters:
  k_Diff_Kq = 1 substance;
  k_Act_Kq = 1 substance;
  k_Deact_Ka = 1 substance;
  k_Deact_Ks = 1 substance;
  k_Diff_Ka = 1 substance;
  k_Clear_Ks = 1 substance;
  k_Clear_Kd = 1 substance;
  k_Prol_Kq = 1 substance;
  k_Prol_Ka = 1 substance;
  e_Prol_K = 1 substance;

  // Reactions:
  Kq_Differentiation: Kq => Kd; k_Diff_Kq*Kq;
  Kq_Activation: Kq => Ka; k_Act_Kq*Kq;
  Ka_Deactivation: Ka => Kq; k_Deact_Ka*Ka;
  Ks_Deactivation: Ks => Kd; k_Deact_Ks*Ks;
  Ka_Differentiation: Ka => Ks; k_Diff_Ka*Ka;
  Ks_Clearance: Ks => $Sink; k_Clear_Ks*Ks;
  Kd_Clearance: Kd => $Sink; k_Clear_Kd*Kd;
  Kq_Proliferation: $Source => Kq; k_Prol_Kq*Kq/(Kq + Ka + e_Prol_K);  // modifiers: Ka
  Ka_Proliferation: $Source => Ka; k_Prol_Ka*Ka/(Ka + Kq + e_Prol_K);  // modifiers: Kq

  // Unit definitions:
  unit substance = mole;
  unit volume = litre;
  unit area = metre^2;
  unit length = metre;
  unit time = second;
end
