// SBML level 2 version 4

model Keratinocytes_0_1()

  // Compartments:
  compartment default = 1 volume;

  // Species:
  substanceOnly species $Source in default = 0;
  substanceOnly species $Sink in default = 0;
  substanceOnly species Kq in default = 0.25;
  substanceOnly species Kd in default = 0.75;
  substanceOnly species W in default = 1;
  substanceOnly species C in default = 1;

  // Parameters:
  k1 = 1 substance; k1 is "Kq Proliferation";
  k2 = 1 substance; k2 is "Kq Differentiation";
  k3 = 1 substance; k3 is "Kd Clearance";
  k4 = 1 substance; k4 is "C Production";
  k5 = 1 substance; k5 is "C Clearance";
  k6 = 5 substance; k6 is "W Clearance";
  E1 = 0.25 substance; E1 is "Kq Promoting Proliferation";
  E2 = 0.25 substance; E2 is "Kq Promoting C Production";
  D1 = 0.25 substance; D1 is "Kq Wounding";
  D2 = 0.25 substance; D2 is "Kd Wounding";
  D3 = 0.25 substance; D3 is "C Wounding";
  D4 = 0.25 substance; D4 is "W Promoting Wounding";
  D5 = 0.25 substance; D5 is "W Promoting Wounding of C";

  // Reactions:
  Proliferation_Kq: $Source => Kq; k1*Kq/(Kq + E1);
  Differentiation_Kq: Kq => Kd; k2*Kq;
  Clearance_Kd: Kd => $Sink; k3*Kd;
  Production_C: $Source => C; k4*Kq/(Kq + E2);  // modifiers: Kq
  Clearance_C: C => $Sink; k5*C;
  Wounding_Kq: Kq => $Sink; D1*Kq*W/(W + D4);  // modifiers: W
  Wounding_Kd: Kd => $Sink; D2*Kd*W/(W + D4);  // modifiers: W
  Wounding_C: C => $Sink; D3*C*W/(W + D5);  // modifiers: W
  Clearance_W: W => $Sink; k6*W;

  // Unit definitions:
  unit substance = mole;
  unit volume = litre;
  unit area = metre^2;
  unit length = metre;
  unit time = second;
end
