// SBML level 2 version 4

model Keratinocytes_0_1()

  // Compartments:
  compartment default = 1 volume;

  // Species:
  substanceOnly species $Source in default = 0;
  substanceOnly species $Sink in default = 0;
  substanceOnly species Kq in default = 1;
  substanceOnly species Kd in default = 1;
  substanceOnly species C in default = 1;

  // Parameters:
  k1 = 1 substance; k1 is "Kq Proliferation";
  k2 = 1 substance; k2 is "Kq Differentiation";
  k3 = 1 substance; k3 is "Kd Clearance";
  k4 = 1 substance; k4 is "C Production";
  k5 = 1 substance; k5 is "C Clearance";
  E1 = 1 substance; E1 is "Kq Promoting Proliferation";
  E2 = 1 substance; E2 is "Kq Promoting C Production";

  // Reactions:
  Clearance_C: C => $Sink; k5*C;
  Clearance_Kd: Kd => $Sink; k3*Kd;
  Differentiation_Kq: Kq => Kd; k2*Kq;
  Production_C: $Source => C; k4*Kq/(Kq + E2);  // modifiers: Kq
  Proliferation_Kq: $Source => Kq; k1*Kq/(Kq + E1);

  // Unit definitions:
  unit substance = mole;
  unit volume = litre;
  unit area = metre^2;
  unit length = metre;
  unit time = second;
end
