// SBML level 2 version 4

model untitled()

  // Compartments:
  compartment default = 1 volume;

  // Species:
  substanceOnly species Kq in default = 0.25;
  substanceOnly species Kd in default = 0.75;
  species Ka in default = 0;
  species Ks in default = 0;
  substanceOnly species Iq in default = 1;
  species Ia in default = 0;
  species TGFb in default = 0;
  species IFNg in default = 0;
  species TNFa in default = 0;
  species TGFa in default = 0;
  species IF in default = 0;
  species Sig in default = 0;
  species IL1 in default = 0;
  species TGFbd in default = 0;
  substanceOnly species TGFbp in default = 1;
  species IFNgd in default = 0;
  species TNFad in default = 0;
  species IFd in default = 0;
  species Sigd in default = 0;
  species C in default = 0;
  substanceOnly species F in default = 1;
  species W in default = 0;
  substanceOnly species $Source in default = 0;
  substanceOnly species $Sink in default = 0;

  // Parameters:
  k1 = 1.4668 substance; k1 is "keratinocyte proliferation";
  k2 = 0.0262 substance; k2 is "quiescent keratinocyte differentiation";
  k3 = 0.0022 substance; k3 is "activated keratinocyte deactivation";
  k4 = 1.2907 substance; k4 is "quiescent keratinocyte activation";
  k5 = 0.0212 substance; k5 is "activated keratinocyte deactivation";
  k6 = 0.0102 substance; k6 is "differentiatied keratinocyte clearance";
  k7 = 0.0065 substance; k7 is "spatially-removed keratinocyte deactivation";
  k8 = 0.0019 substance; k8 is "spatially-removed keratinocyte clearance";
  k9 = 0.1 substance; k9 is "quiescent immune cell influx";
  k10 = 0.0001 substance; k10 is "quiescent immune cell influx due to IL1";
  k11 = 0.1088 substance; k11 is "activated immune cell deactivation";
  k12 = 1.2214 substance; k12 is "quiescent immune cell activation";
  k13 = 0.1 substance; k13 is "quiescent immune cell clearance";
  k14 = 0.1066 substance; k14 is "TGFb clearance in the epidermis";
  k15 = 0.2747 substance; k15 is "TGFb mass transfer";
  k16 = 0.0063 substance; k16 is "IFNg clearance";
  k17 = 0.1815 substance; k17 is "IFNg mass transfer";
  k18 = 0.0434 substance; k18 is "TNFa clearance in the epidermis";
  k19 = 0.0004 substance; k19 is "TNFa production";
  k20 = 0.0642 substance; k20 is "TNFa mass transfer";
  k21 = 0.0277 substance; k21 is "TGFa production";
  k22 = 0.0827 substance; k22 is "TGFa clearance in the epidermis";
  k23 = 0.01 substance; k23 is "IF production";
  k24 = 0.01 substance; k24 is "IF clearance in the epidermis";
  k25 = 0.0625 substance; k25 is "IF mass transfer";
  k26 = 0.02 substance; k26 is "Sig production";
  k27 = 0.02 substance; k27 is "Sig clearance in the epidermis";
  k28 = 0.0785 substance; k28 is "Sig mass transfer";
  k29 = 1 substance; k29 is "IL1 release";
  k30 = 0.0001 substance; k30 is "IL1 production";
  k31 = 1.4211 substance; k31 is "IL1 clearance in the epidermis";
  k32 = 0.0546 substance; k32 is "TGFb clearance in the dermis";
  k33 = 0.0026 substance; k33 is "TGFb release from reserve";
  k34 = 0.0017 substance; k34 is "TGFb release due to Sig";
  k35 = 0.0738 substance; k35 is "IFNg production";
  k36 = 0.0063 substance; k36 is "IFNg clearance in the dermis";
  k37 = 0.107 substance; k37 is "TNFa production";
  k38 = 0.1005 substance; k38 is "TNFa clearance in dermis";
  k39 = 0.02 substance; k39 is "IF clearance in dermis";
  k40 = 0.02 substance; k40 is "Sig clearance in dermis";
  k41 = 0.0066 substance; k41 is "C production";
  k42 = 0.0089 substance; k42 is "C clearance";
  k43 = 0.0975 substance; k43 is "F production";
  k44 = 0.0975 substance; k44 is "F clearance";
  k45 = 5 substance; k45 is "W clearance";
  E1 = 0.25 substance;
  E2 = 0.25 substance;
  E3 = 0.25 substance;
  E4 = 0.25 substance;
  E5 = 0.25 substance;
  E6 = 0.25 substance;
  E7 = 0.25 substance;
  E8 = 0.25 substance;
  E9 = 0.25 substance;
  E10 = 0.25 substance;
  E11 = 0.25 substance;
  E12 = 0.25 substance;
  E13 = 0.25 substance;
  E14 = 0.25 substance;
  E15 = 0.25 substance;
  E16 = 0.25 substance;
  E17 = 0.25 substance;
  E18 = 0.25 substance;
  E19 = 0.25 substance;
  E20 = 0.25 substance;
  E21 = 0.25 substance;
  E22 = 0.25 substance;
  D1 = 0.25 substance;
  D2 = 0.25 substance;
  D3 = 0.25 substance;
  D4 = 0.25 substance;

  // Reactions:
  Activation_I: Iq => Ia; k12*Iq*IF/(IF + E10);  // modifiers: IF
  Activation_K: Kq => Ka; k4*Kq*IL1/(IL1 + E6);  // modifiers: IL1
  Deactivation_I: Ia => Iq; k11*Ia;
  Deactivation_K: Ka => Kq; k3*Ka*TGFb/(TGFb + E3)*E4/(IFNg + E4)*E5/(TNFa + E5);  // modifiers: TGFb, IFNg, TNFa
  Deactivation_Ks: Ks => Kd; k7*Ks;
  Differentiation: Kq => Kd; k2*Kq;
  Separation: Ka => Ks; k5*Ka;
  Proliferation_Kq: $Source => Kq; k1*Kq/(Kq + E1)*E2/(TGFb + E2);  // modifiers: TGFb
  Proliferation_Ka: $Source => Ka; k1*Ka/(Ka + E1)*E2/(TGFb + E2)*TNFa/(TNFa + E7)*IL1/(IL1 + E6);  // modifiers: IL1, TNFa, TGFb
  Clearance_Kd: Kd => $Sink; k6*Kd;
  Clearance_Ks: Ks => $Sink; k8*Ks;
  Influx_Iq: $Source => Iq; k9 + k10*IL1/(IL1 + E9);  // modifiers: IL1
  Clearance_Iq: Iq => $Sink; k13*Iq;
  Mass_Transfer_TGFb: TGFbd => TGFb; k15*(TGFbd - TGFb)*E11/(C + E11)*F/(F + E12);  // modifiers: F, C
  Clearance_TGFb: TGFb => $Sink; k14*TGFb;
  Mass_Transfer_IFNg: IFNgd => IFNg; k17*(IFNgd - IFNg)*E11/(C + E11)*F/(E12 + F);  // modifiers: C, F
  Clearance_IFNg: IFNg => $Sink; k16*IFNg;
  Mass_Transfer_TNFa: TNFad => TNFa; k20*(TNFad - TNFa)*E11/(C + E11)*F/(F + E12);  // modifiers: F, C
  Clearance_TNFa: TNFa => $Sink; k18*TNFa;
  Mass_Transfer_IF: IFd => IF; k25*(IFd - IF)*E11/(C + E11)*F/(E12 + F);  // modifiers: F, C
  Clearance_IF: IF => $Sink; k24*IF;
  Mass_Transfer_Sig: Sigd => Sig; k28*(Sigd - Sig)*E11/(C + E11)*F/(E12 + F);  // modifiers: F, C
  Clearance_Sig: Sig => $Sink; k27*Sig;
  Clearance_TGFa: TGFa => $Sink; k22*TGFa;
  Clearance_IL1: IL1 => $Sink; k31*IL1;
  Production_TNFa: $Source => TNFa; k19*Ks/(Ks + E13);  // modifiers: Ks
  Production_IF: $Source => IF; k23*Ka/(Ka + E15);  // modifiers: Ka
  Production_Sig: $Source => Sig; k26*Ka/(Ka + E16);  // modifiers: Ka
  Production_TGFa: $Source => TGFa; k21*Ka/(Ka + E14);  // modifiers: Ka
  Production_IL1: $Source => IL1; k30*Ka/(Ka + E17);  // modifiers: Ka
  Release_IL1: $Source => IL1; k29*D2*Kd*W/(W + E7);  // modifiers: Kd, W
  Release_TGFb: TGFbp => TGFbd; k33*TGFbp + k34*TGFbp*Sigd/(Sigd + E18);  // modifiers: Sigd
  Clearance_TGFbd: TGFbd => $Sink; k32*TGFbd;
  Production_IFNgd: $Source => IFNgd; k37*Ia/(Ia + E20);  // modifiers: Ia
  Clearance_IFNgd: IFNgd => $Sink; k36*IFNgd;
  Production_TNFad: $Source => TNFad; k37*Ia/(Ia + E20);  // modifiers: Ia
  Clearance_TNFad: TNFad => $Sink; k38*TNFad;
  Clearance_IFd: IFd => $Sink; k39*IFd;
  Clearance_Sigd: Sigd => $Sink; k40*Sigd;
  Production_C: $Source => C; k41*Kq/(Kq + E21);  // modifiers: Kq
  Clearance_C: C => $Sink; k42*C;
  Wounding_C: C => $Sink; D3*C*W/(W + E7);  // modifiers: W
  Production_F: $Source => F; k43*Ka/(Ka + E22);  // modifiers: Ka
  Clearance_F: F => $Sink; k44*F;
  Wounding_Kd: Kd => $Sink; D2*Kd*W/(W + D4);  // modifiers: W
  Wounding_Kq: Kq => $Sink; D1*Kq*W/(W + D4);  // modifiers: W
  Clearance_W: W => $Sink; k45*W;

  // Unit definitions:
  unit substance = mole;
  unit volume = litre;
  unit area = metre^2;
  unit length = metre;
  unit time = second;
end
