// SBML level 2 version 4

model MassTransferKinetics()

  // Compartments:
  compartment default = 1 volume;
  compartment Epidermis in default = 1 volume;

  // Species:
  substanceOnly species Epidermal_Signal in Epidermis = 1;
  substanceOnly species Dermal_Signal in default = 1;
  substanceOnly species $Collagen in Epidermis = 1;
  substanceOnly species $Fibronectin in Epidermis = 1;
  substanceOnly species $Source in default = 0;
  substanceOnly species $Sink_default in default = 0;
  substanceOnly species $Sink_Epidermis in Epidermis = 0;

  // Parameters:
  k_Prod_SD = 1 substance;
  k_Clnc_SD = 1 substance;
  k_MT_SD_SE = 1 substance;
  k_MT_SE_SD = 1 substance;
  k_Clnc_SE = 1 substance;
  E_Fibronectin = 1 substance;
  E_Collagen = 1 substance;

  // Reactions:
  Dermis_to_Epidermis: Dermal_Signal => Epidermal_Signal; k_MT_SD_SE*Dermal_Signal*E_Collagen/(E_Collagen + Collagen)*Fibronectin/(E_Fibronectin + Fibronectin);  // modifiers: Collagen, Fibronectin
  Dermal_Clearance: Dermal_Signal => $Sink_default; k_Clnc_SD*Dermal_Signal;
  Epidermis_to_Dermis: Epidermal_Signal => Dermal_Signal; k_MT_SE_SD*Epidermal_Signal*E_Collagen/(E_Collagen + Collagen)*Fibronectin/(E_Fibronectin + Fibronectin);  // modifiers: Collagen, Fibronectin
  Epidermal_Clearance: Epidermal_Signal => $Sink_Epidermis; k_Clnc_SE*Epidermal_Signal;
  Production_Signal: $Source => Dermal_Signal; k_Prod_SD;

  // Unit definitions:
  unit substance = mole;
  unit volume = litre;
  unit area = metre^2;
  unit length = metre;
  unit time = second;
end
