// SBML level 2 version 4

model Ocillator_Practice()

  // Compartments:
  compartment default = 1 volume;

  // Species:
  substanceOnly species Q in default = 0.249;
  substanceOnly species A in default = 0.001;
  substanceOnly species $Source in default = 0;
  substanceOnly species $Sink in default = 0;
  substanceOnly species TGFA in default = 1;
  substanceOnly species TGFB in default = 1;
  substanceOnly species IFNG in default = 1;
  substanceOnly species TNFA in default = 1;
  substanceOnly species IL1 in default = 1;

  // Parameters:
  k1 = 2 substance; k1 is "Rate of Quiescent Keratinocyte Proliferation";
  k2 = 0.001 substance; k2 is "Rate of Activated Keratinocyte Proliferation";
  k3 = 0.001 substance; k3 is "Rate of Quiescent Keratinocyte Differentiation";
  k4 = 0.001 substance; k4 is "Rate of Activated Keratinocyte Differentiation";
  k5 = 0.001 substance; k5 is "Rate of Quiescent Keratinocyte Activation";
  k6 = 0.001 substance; k6 is "Rate of Activated Keratinocyte Deactivation";
  E1 = 0.5 substance; E1 is "Half-Maximal Number of Keratinocytes";
  E2 = 1 substance; E2 is "Half-Maximal Conc. TGFB Inhibiting Keratinocyte Proliferation";
  E3 = 1 substance; E3 is "Half-Maximal Conc. IL1 Promoting Quiescent Keratinocyte Activation";
  E4 = 1 substance; E4 is "Half-Maximal Conc. TNFA Promoting Acivated Keratinocyte Proliferation";
  E5 = 1 substance; E5 is "Half-Maximal Conc. IL1 Promoting Activated Keratinocyte Proliferation";
  E6 = 1 substance; E6 is "Half-Maximal Conc. IFNG Inhibiting Activated Keratinocyte Deactivation";
  E7 = 1 substance; E7 is "Half-Maximal Conc. TGFA Inhibiting Activated Keratinocyte Deactivation";
  E8 = 1 substance; E8 is "Half-Maximal Conc. TGFB Promoting Activated Keratinocyte Deactivation";
  k7 = 0.001 substance; k7 is "Rate of IL1 Circulation/Clearance";

  // Reactions:
  re1: Q => A; k5*Q*(IL1/(IL1 + E3));  // modifiers: IL1
  re2: A => Q; k6*A*(TGFA/(TGFA + E7))*(IFNG/(IFNG + E6))*(E8/(E8 + TGFB));  // modifiers: TGFB, TGFA, IFNG
  re3: Q => $Sink; k3*Q;
  re4: A => $Sink; k4*A;
  re5: $Source => Q; k1*Q/(Q + A + E1)*(E2/(TGFB + E2));  // modifiers: TGFB, A
  re6: $Source => A; k2*(A/(A + Q + E1))*(E2/(E2 + TGFB))*(IL1/(IL1 + E5))*(TNFA/(TNFA + E4));  // modifiers: IL1, TNFA, TGFB, Q
  re7: IL1 => $Sink; k7*IL1;
  re8: $Source => IL1; k7;

  // Unit definitions:
  unit substance = mole;
  unit volume = litre;
  unit area = metre^2;
  unit length = metre;
  unit time = second;
end
