// SBML level 3 version 2

model Goldbeter_Calcium_Oscillation_based_on_CICR_AND_CA_Activated_degradation_of_IP3()
  // model units - substance: substance, time: time_unit

  // Compartments:
  compartment default = 1;

  // Species:
  species Kq in default = 0.25;
  species Kd in default = 0.75;
  species TGFB in default = 1;
  species $Source in default = 0;
  species $Sink in default = 0;

  // Parameters:
  Kq_prol = 0.01;
  E_keras = 2;
  E_TGFB_Kq_prol = 2;
  Kq_to_Kd = 0.005;
  Kd_clear = 0.001;

  // Reactions:
  Kq_Proliferation: $Source => Kq; Kq_prol*Kq/(Kq + E_keras)*E_TGFB_Kq_prol/(E_TGFB_Kq_prol + TGFB);  // modifiers: TGFB
  Kq_Differentiation: Kq => Kd; Kq_to_Kd*Kq;
  Kd_Clearance: Kd => $Sink; Kd_clear*Kd;

  // Unit definitions:
  unit substance = 1e-6 mole; substance is "micromole (default)";
  unit time_unit = 1; time_unit is "hour (default)";
  unit minute = 1;
end
